# Численное решение ДУ
# Реашем ДУ 1 порядка y`=f(x,y
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# Вводим правую часть
f(x, y) := 3/x - y/x
# Определяем начальную точку
x[0] := 1
y[0] := 0  # Шаг
h := 0.1
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# Диапазон изменения индекса точек
i := 0 .. 9
# Вычисления в методе Эйлера
x[i + 1] := x[i] + h
y[i + 1] := y[i] + h*f(x[i], y[i])
# Аналитическое решения
g(x) := 3 - 3/x
# Таблица значений численного решения ДУ
g(x) = [0; 0.272727; 0.5; 0.692308; 0.857143; 1; 1.125; 1.23529; 1.33333; 1.42105; 1.5]
График
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y = [0; 0.3; 0.545455; 0.75; 0.923077; 1.07143; 1.2; 1.3125; 1.41176; 1.5; 1.57895]
x = [1; 1.1; 1.2; 1.3; 1.4; 1.5; 1.6; 1.7; 1.8; 1.9; 2]
