# tablichky delat na zapyatuy
# range delat na tochky s zapyatoi
i := 0 .. 3
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i = [0; 1; 2; 3]
y[i] := -0.29, 0.32, 2.35, 3.66
x[i] := 0.63, 1.28, 2.53, 3.17
L(x) := 0.29*(-(x - 1.28)*(x - 2.53)*(x - 3.17)/((0.63 - 1.28)*(0.63 - 2.53)*(0.63 - 3.17))) + 0.32*(x - 0.63)*(x - 2.53)*(x - 3.17)/((1.28 - 0.63)*(1.28 - 2.53)*(1.28 - 3.17)) + 2.35*(x - 0.63)*(x - 1.28)*(x - 3.17)/((2.53 - 0.63)*(2.53 - 1.28)*(2.53 - 3.17)) + 3.66*(x - 0.63)*(x - 1.28)*(x - 2.53)/((3.17 - 0.63)*(3.17 - 1.28)*(3.17 - 2.53)) simplify → 0.600405979111*x^2 - 0.0539631221873*x^3 - 0.0549668773206*x - 0.480178683584
L(2.75) = 2.78697
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