h := 0.5
y := [0.69; 1.18; 1.61; 1.98; 2.3]
z := [1; 1.5; 2; 2.5; 3]
P(x) := 0.69 + 0.49/h*(x - 1) + (-0.06/(h^2*2!)*(x - 1)*(x - 1.5)) + 0/(h^3*3!)*(x - 1)*(x - 1.5)*(x - 2) + 0.01/(h^4*4!)*(x - 1)*(x - 1.5)*(x - 2)*(x - 2.5) collect → 0.00666666666667*x^4 - 0.0466666666667*x^3 - 0.00166666666667*x^2 + 1.15166666667*x - 0.42
P(1.3) = 0.990864
F(x) := 0.00666666666667*x^4 - 0.0466666666667*x^3 - 0.00166666666667*x^2 + 1.15166666667*x - 0.42 coeffs → [-0.42; 1.15166666667; -0.00166666666667; -0.0466666666667; 0.00666666666667]
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[-0.42; 1.15166666667; -0.00166666666667; -0.0466666666667; 0.00666666666667] = [-0.42; 1.15167; -0.00166667; -0.0466667; 0.00666667]
P(x) := 0.007*x^4 - 0.047*x^3 - 0.002*x^2 + 1.152*x - 0.42
