# tablichky delat na zapyatuy
# range delat na tochky s zapyatoi
i := 0 .. 3
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i = [0; 1; 2; 3]
y[i] := -1, -6, 3, 12
x[i] := 2, 4, 7, 8
L(x) := -1*(x - 4)*(x - 7)*(x - 8)/((2 - 4)*(2 - 7)*(2 - 8)) - 6*(x - 2)*(x - 7)*(x - 8)/((4 - 2)*(4 - 7)*(4 - 8)) + 3*(x - 2)*(x - 4)*(x - 8)/((7 - 2)*(7 - 4)*(7 - 8)) + 12*(x - 2)*(x - 4)*(x - 7)/((8 - 2)*(8 - 4)*(8 - 7)) simplify → x^3/15 + 7*x^2/30 - 173*x/30 + 136/15
L(2.12) = -1.47476
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