h := 0.6
y := [0.73; 2.25; 3.56; 4.57; 4.89]
z := [0.1; 0.7; 1.3; 1.9; 2.5]
P(x) := 0.73 + 1.52/h*(x - 0.1) + (-0.21/(2!*h^2)*(x - 0.1)*(x - 0.7)) + (-0.09/(3!*h^3)*(x - 0.1)*(x - 0.7)*(x - 1.3)) + (-0.3/(4!*h^4)*(x - 0.1)*(x - 0.7)*(x - 1.3)*(x - 1.9)) collect → 0.316358024691*x^3 - 0.096450617284*x^4 - 0.637731481481*x^2 + 2.90177469136*x + 0.445893132716
P(0.4) = 1.52234
F(x) := 0.316358024691*x^3 - 0.096450617284*x^4 - 0.637731481481*x^2 + 2.90177469136*x + 0.445893132716 coeffs → [0.445893132716; 2.90177469136; -0.637731481481; 0.316358024691; -0.096450617284]
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[0.445893132716; 2.90177469136; -0.637731481481; 0.316358024691; -0.096450617284] = [0.445893; 2.90177; -0.637731; 0.316358; -0.0964506]
P(x) := □  # error: This placeholder is empty.
