# Численное решение ДУ
# Реашем ДУ 1 порядка y`=f(x,y
f(x, y) := x^2 - 2*y  # Шаг
x[0] := 0
y[0] := 1.25
h := 0.1
# Аналитическое решения
i := 0 .. 9
x[i + 1] := x[i] + h
# Вводим правую часть
# Определяем начальную точку
# Диапазон изменения индекса точек
# Вычисления в методе Эйлера
y[i + 1] := y[i] + h*f(x[i], y[i])
g(x) := e^(-2*x) + x^2/2 - x/2 + 1/4
# Таблица значений численного решения ДУ
График
g(x) = [1.25; 1.02373; 0.84032; 0.693812; 0.579329; 0.492879; 0.431194; 0.391597; 0.371897; 0.370299; 0.385335]
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y = [1.25; 1; 0.801; 0.6448; 0.52484; 0.435872; 0.373698; 0.334958; 0.316966; 0.317573; 0.335059]
x = [0; 0.1; 0.2; 0.3; 0.4; 0.5; 0.6; 0.7; 0.8; 0.9; 1]
