A := [2.2, -3.1, 4.2, -5.1; 1.3, 2.2, -1.4, 1.5; 6.2, -7.4, 8.5, -9.6; 1.2, 1.3, 1.4, 4.5]
B := [6; 10; 1.1; 1.6]
X := A^-1*B
|A| = -129.315
X = [0.623761; 8.62315; 3.39051; -3.35674]
A1 := [2.34, -4.21, -11.61; 8.04, 5.22, 0.27; 3.92, -7.99, 8.37]
B1 := [14.41; -6.44; 55.56]
X1 := A1^-1*B1
|A1| = 1369.53
# [component: outputs x]
X1 = [2.29302; -4.81552; 0.967185]
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